f(t, α, β) := t^(α - 1)*e^(-β*t)*β^α/Γ(α)  # Математическое ожидание
# Мода
M(α, β) := α/β
Mo(α, β) := (α - 1)/β
F(t, α, β) := integral(f(t, α, β), t = 0 .. t)  # Дисперсия
# Начальный момент k-го порядка
D(α, β) := α/β^2
t ≥ 0
α[1] := 9
β[1] := 6
# СКО
v(k, t, α, β) := integral(t^k*f(t, α, β), t = -∞ .. ∞)
α[2] := 8
β[2] := 3
δ(α, β) := sqrt(α)/β
α[3] := 7.5
β[3] := 1
# Коэффициент ассиметрии
a(α) := 2/sqrt(α)
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t := 1.5
Me[1] := root(F(t, α[1], β[1]) - 0.5, t) = 1.44483
t := 2.5
Me[2] := root(F(t, α[2], β[2]) - 0.5, t) = 2.55642
t := 7.5
Me[3] := root(F(t, α[3], β[3]) - 0.5, t) = 7.16943
