f(t, α, β) := t^(α - 1)*e^(-β*t)*β^α/Γ(α)  # Математическое ожидание
M(α, β) := α/β
F(t, α, β) := integral(f(t, α, β), t = 0 .. t)  # Дисперсия
D(α, β) := α/β^2
t ≥ 0
α[1] := 9
β[1] := 6  # СКО
α[2] := 8
β[2] := 3
δ(α, β) := sqrt(α)/β
α[3] := 7.5
β[3] := 1
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n := 10000
i := 1 .. n
a := 0
b := 1
Y1 := runif(n, a, b)
X1(i, j) := root(F(x, α[1], β[1]) - Y1, x, 0, 1)
X11 := matrix(n, 1, X1)  # error: This function cannot be used here.
X2 := sort(X1)  # error: This value must be a scalar.
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bin := 10
lower := floor(min(X1))  # error: This value has the form: ƒ(any1, any2) → Unitless, but must have the form: any1.
upper := ceil(max(X1))  # error: This value has the form: ƒ(any1, any2) → Unitless, but must have the form: any1.
h := (upper - lower)/bin  # error: This variable is undefined.
j := 1 .. bin + 1
int[j] := lower + h*j  # error: This variable is undefined.
t := hist(int, X1)/n  # error: This variable is undefined.
int := int + h/2  # error: This variable is undefined.
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m1 := sum(X1[i], i = 0 .. n - 1)/n  # error: This value must be an array.
M(α[1], β[1]) = 1.5
